# OpenSim document version 30000
ControlSet Control Set:
  ControlLinear [values shared by the 54 below unless stated]: is_model_control=true extrapolate=true default_min=0.02
      default_max=1 filter_on=false use_steps=false kp=100 kv=20
  ControlLinear glut_med1_r:
    x_nodes:
      ControlLinearNode: t=0.408 value=0.08954361
      ControlLinearNode: t=0.424 value=0.06248826
      ControlLinearNode: t=0.44 value=0.1106237
  ControlLinear glut_med2_r:
    x_nodes:
      ControlLinearNode: t=0.408 value=0.1018183
      ControlLinearNode: t=0.424 value=0.06469414
      ControlLinearNode: t=0.44 value=0.1148975
  ControlLinear glut_med3_r:
    x_nodes:
      ControlLinearNode: t=0.408 value=0.1189999
      ControlLinearNode: t=0.424 value=0.07401974
      ControlLinearNode: t=0.44 value=0.1017112
  ControlLinear bifemlh_r:
    x_nodes:
      ControlLinearNode: t=0.408 value=0.003850151
      ControlLinearNode: t=0.424 value=0.01788249
      ControlLinearNode: t=0.44 value=0.01784853
  ControlLinear bifemsh_r:
    x_nodes:
      ControlLinearNode: t=0.408 value=0.2401624
      ControlLinearNode: t=0.424 value=0.1905725
      ControlLinearNode: t=0.44 value=0.2898177
  ControlLinear sar_r:
    x_nodes:
      ControlLinearNode: t=0.408 value=0.1291565
      ControlLinearNode: t=0.424 value=0.1330612
      ControlLinearNode: t=0.44 value=0.1893692
  ControlLinear add_mag2_r:
    x_nodes:
      ControlLinearNode: t=0.408 value=0.003216898
      ControlLinearNode: t=0.424 value=0.015189
      ControlLinearNode: t=0.44 value=0.0175069
  ControlLinear tfl_r:
    x_nodes:
      ControlLinearNode: t=0.408 value=0.1213487
      ControlLinearNode: t=0.424 value=0.1110824
      ControlLinearNode: t=0.44 value=0.1693369
  ControlLinear pect_r:
    x_nodes:
      ControlLinearNode: t=0.408 value=0.06383618
      ControlLinearNode: t=0.424 value=0.1036237
      ControlLinearNode: t=0.44 value=0.137221
  ControlLinear grac_r:
    x_nodes:
      ControlLinearNode: t=0.408 value=0.05008077
      ControlLinearNode: t=0.424 value=0.1034844
      ControlLinearNode: t=0.44 value=0.1291891
  ControlLinear glut_max1_r:
    x_nodes:
      ControlLinearNode: t=0.408 value=0.05034159
      ControlLinearNode: t=0.424 value=0.0682768
      ControlLinearNode: t=0.44 value=0.09711098
  ControlLinear glut_max2_r:
    x_nodes:
      ControlLinearNode: t=0.408 value=0.03002324
      ControlLinearNode: t=0.424 value=0.05143367
      ControlLinearNode: t=0.44 value=0.07262137
  ControlLinear glut_max3_r:
    x_nodes:
      ControlLinearNode: t=0.408 value=0.01218912
      ControlLinearNode: t=0.424 value=0.04316621
      ControlLinearNode: t=0.44 value=0.37556
  ControlLinear iliacus_r:
    x_nodes:
      ControlLinearNode: t=0.408 value=0.2275623
      ControlLinearNode: t=0.424 value=0.1983597
      ControlLinearNode: t=0.44 value=0.2840977
  ControlLinear psoas_r:
    x_nodes:
      ControlLinearNode: t=0.408 value=0.2346825
      ControlLinearNode: t=0.424 value=0.2019099
      ControlLinearNode: t=0.44 value=0.2901999
  ControlLinear quad_fem_r:
    x_nodes:
      ControlLinearNode: t=0.408 value=0.0555921
      ControlLinearNode: t=0.424 value=0.09635013
      ControlLinearNode: t=0.44 value=0.09011473
  ControlLinear gem_r:
    x_nodes:
      ControlLinearNode: t=0.408 value=0.06401076
      ControlLinearNode: t=0.424 value=0.1024349
      ControlLinearNode: t=0.44 value=0.1302967
  ControlLinear peri_r:
    x_nodes:
      ControlLinearNode: t=0.408 value=0.07176971
      ControlLinearNode: t=0.424 value=0.1011794
      ControlLinearNode: t=0.44 value=0.1256671
  ControlLinear rect_fem_r:
    x_nodes:
      ControlLinearNode: t=0.408 value=0.07217061
      ControlLinearNode: t=0.424 value=0.09265017
      ControlLinearNode: t=0.44 value=0.1362984
  ControlLinear vas_int_r:
    x_nodes:
      ControlLinearNode: t=0.408 value=0.005672712
      ControlLinearNode: t=0.424 value=0.01151336
      ControlLinearNode: t=0.44 value=0.02982104
  ControlLinear med_gas_r:
    x_nodes:
      ControlLinearNode: t=0.408 value=1.377794e-9
      ControlLinearNode: t=0.424 value=4.892371e-5
      ControlLinearNode: t=0.44 value=1.236468e-7
  ControlLinear soleus_r:
    x_nodes:
      ControlLinearNode: t=0.408 value=0
      ControlLinearNode: t=0.424 value=4.22676e-5
      ControlLinearNode: t=0.44 value=1.086584e-7
  ControlLinear tib_post_r:
    x_nodes:
      ControlLinearNode: t=0.408 value=0
      ControlLinearNode: t=0.424 value=3.926932e-5
      ControlLinearNode: t=0.44 value=9.965124e-8
  ControlLinear tib_ant_r:
    x_nodes:
      ControlLinearNode: t=0.408 value=0.002185509
      ControlLinearNode: t=0.424 value=0.001015901
      ControlLinearNode: t=0.44 value=0.002505035
  ControlLinear glut_med1_l:
    x_nodes:
      ControlLinearNode: t=0.408 value=0.6538076
      ControlLinearNode: t=0.424 value=0.5582277
      ControlLinearNode: t=0.44 value=0.6226364
  ControlLinear glut_med2_l:
    x_nodes:
      ControlLinearNode: t=0.408 value=0.3125192
      ControlLinearNode: t=0.424 value=0.2685108
      ControlLinearNode: t=0.44 value=0.2223706
  ControlLinear glut_med3_l:
    x_nodes:
      ControlLinearNode: t=0.408 value=0.1297764
      ControlLinearNode: t=0.424 value=0.1112843
      ControlLinearNode: t=0.44 value=0.104189
  ControlLinear bifemlh_l:
    x_nodes:
      ControlLinearNode: t=0.408 value=0.0384004
      ControlLinearNode: t=0.424 value=0.04518933
      ControlLinearNode: t=0.44 value=0.06500006
  ControlLinear bifemsh_l:
    x_nodes:
      ControlLinearNode: t=0.408 value=0.1332392
      ControlLinearNode: t=0.424 value=0.1601197
      ControlLinearNode: t=0.44 value=0.209559
  ControlLinear sar_l:
    x_nodes:
      ControlLinearNode: t=0.408 value=0.09670394
      ControlLinearNode: t=0.424 value=0.1149563
      ControlLinearNode: t=0.44 value=0.1622069
  ControlLinear add_mag2_l:
    x_nodes:
      ControlLinearNode: t=0.408 value=0.00454632
      ControlLinearNode: t=0.424 value=0.009138462
      ControlLinearNode: t=0.44 value=0.02180034
  ControlLinear tfl_l:
    x_nodes:
      ControlLinearNode: t=0.408 value=0.1502619
      ControlLinearNode: t=0.424 value=0.1601587
      ControlLinearNode: t=0.44 value=0.2025135
  ControlLinear pect_l:
    x_nodes:
      ControlLinearNode: t=0.408 value=0.03939783
      ControlLinearNode: t=0.424 value=0.07125746
      ControlLinearNode: t=0.44 value=0.1129963
  ControlLinear grac_l:
    x_nodes:
      ControlLinearNode: t=0.408 value=0.04082099
      ControlLinearNode: t=0.424 value=0.06965475
      ControlLinearNode: t=0.44 value=0.1113477
  ControlLinear glut_max1_l:
    x_nodes:
      ControlLinearNode: t=0.408 value=0.07541849
      ControlLinearNode: t=0.424 value=0.09033474
      ControlLinearNode: t=0.44 value=0.1179291
  ControlLinear glut_max2_l:
    x_nodes:
      ControlLinearNode: t=0.408 value=0.06964383
      ControlLinearNode: t=0.424 value=0.0619963
      ControlLinearNode: t=0.44 value=0.08991003
  ControlLinear glut_max3_l:
    x_nodes:
      ControlLinearNode: t=0.408 value=0.02119374
      ControlLinearNode: t=0.424 value=0.02826532
      ControlLinearNode: t=0.44 value=0.06616324
  ControlLinear iliacus_l:
    x_nodes:
      ControlLinearNode: t=0.408 value=0.06982311
      ControlLinearNode: t=0.424 value=0.1203341
      ControlLinearNode: t=0.44 value=0.2047753
  ControlLinear psoas_l:
    x_nodes:
      ControlLinearNode: t=0.408 value=0.06464771
      ControlLinearNode: t=0.424 value=0.1166259
      ControlLinearNode: t=0.44 value=0.197994
  ControlLinear quad_fem_l:
    x_nodes:
      ControlLinearNode: t=0.408 value=0.01547836
      ControlLinearNode: t=0.424 value=0.02102599
      ControlLinearNode: t=0.44 value=0.0563116
  ControlLinear gem_l:
    x_nodes:
      ControlLinearNode: t=0.408 value=0.04392222
      ControlLinearNode: t=0.424 value=0.06175824
      ControlLinearNode: t=0.44 value=0.1072666
  ControlLinear peri_l:
    x_nodes:
      ControlLinearNode: t=0.408 value=0.073473
      ControlLinearNode: t=0.424 value=0.06814924
      ControlLinearNode: t=0.44 value=0.1084012
  ControlLinear rect_fem_l:
    x_nodes:
      ControlLinearNode: t=0.408 value=0.02056679
      ControlLinearNode: t=0.424 value=0.03555747
      ControlLinearNode: t=0.44 value=0.0870607
  ControlLinear vas_int_l:
    x_nodes:
      ControlLinearNode: t=0.408 value=0.00511464
      ControlLinearNode: t=0.424 value=0.008702912
      ControlLinearNode: t=0.44 value=0.01932076
  ControlLinear med_gas_l:
    x_nodes:
      ControlLinearNode: t=0.408 value=0.4159874
      ControlLinearNode: t=0.424 value=0.3970741
      ControlLinearNode: t=0.44 value=0.4508295
  ControlLinear soleus_l:
    x_nodes:
      ControlLinearNode: t=0.408 value=0.08568617
      ControlLinearNode: t=0.424 value=0.08415348
      ControlLinearNode: t=0.44 value=0.08389897
  ControlLinear tib_post_l:
    x_nodes:
      ControlLinearNode: t=0.408 value=0.1380486
      ControlLinearNode: t=0.424 value=0.134886
      ControlLinearNode: t=0.44 value=0.1198943
  ControlLinear tib_ant_l:
    x_nodes:
      ControlLinearNode: t=0.408 value=0.1216949
      ControlLinearNode: t=0.424 value=0.1096674
      ControlLinearNode: t=0.44 value=0.1447604
  ControlLinear ercspn_r:
    x_nodes:
      ControlLinearNode: t=0.408 value=0.1724358
      ControlLinearNode: t=0.424 value=0.185964
      ControlLinearNode: t=0.44 value=0.2145419
  ControlLinear ercspn_l:
    x_nodes:
      ControlLinearNode: t=0.408 value=0.1030982
      ControlLinearNode: t=0.424 value=0.142932
      ControlLinearNode: t=0.44 value=0.1955051
  ControlLinear intobl_r:
    x_nodes:
      ControlLinearNode: t=0.408 value=0.07761907
      ControlLinearNode: t=0.424 value=0.08323062
      ControlLinearNode: t=0.44 value=0.1004123
  ControlLinear intobl_l:
    x_nodes:
      ControlLinearNode: t=0.408 value=0.03095629
      ControlLinearNode: t=0.424 value=0.06506474
      ControlLinearNode: t=0.44 value=0.0996877
  ControlLinear extobl_r:
    x_nodes:
      ControlLinearNode: t=0.408 value=0.03473957
      ControlLinearNode: t=0.424 value=0.06095952
      ControlLinearNode: t=0.44 value=0.09036845
  ControlLinear extobl_l:
    x_nodes:
      ControlLinearNode: t=0.408 value=0.039049
      ControlLinearNode: t=0.424 value=0.05627711
      ControlLinearNode: t=0.44 value=0.08788574
